folder Gatton_RUE: version=37; creator=Apsim 7.10-r0
  folder shared
    variables My Variables
      variables: dd/mm/yyyy as date, DaysAfterSowing, Leafno, lai, tillers, tillersAdded, calculatedTillers, Supply, Demand, sw_dep(), SLA, maxSLA, ll15_dep(), dul_dep(), WaterSD, Biomass, yield, GrainNo, stage, biomass_wt, GrainGreenWt, RachisGreenWt, StemGreenWt, GrainSize, LeafSenescedWt, TillerNoFertile, TPLA, SPLA, DeltaTT, LeafGreenWt, DeltaLAI, DeltaGreenN()
    sorghum
      sorghumGenotype M35-1
        tt_emerg_to_endjuv = 100
        photoperiod_crit1 = 11.5
        photoperiod_crit2 = 13.5
        photoperiod_slope = 61
        tt_endjuv_to_init = 252
        tt_flag_to_flower = 170
        tt_flower_to_start_grain = 80
        tt_flower_to_maturity = 761
        tt_maturity_to_ripe = 1
        main_stem_coef = 2.82
        tpla_prod_coef = 0.011
        dm_per_seed = 0.00142784
        x_stem_wt = 0    80
        y_height = 0  2000
        partition_rate_leaf = 0.018
        nUptakeCease = 10
        leaf_init_rate = 26.1
        targetLeafSLN = 1.2
        maxGFRate = 0.09
        x_stem_wt = 0    80  # look up table for canopy height
        y_height = 0  2000  # plant canopy height
        aX0 = 0.687  # Largest leaf multiplier
        aMaxS = 22.25  # Largest Leaf Area Slope
        aMaxI = 92.45  # Intercept for Largest leaf calculation
        aMaxVert = 0.3  # Vertical Offset for Largest Leaf Calc
        tillerSdIntercept = -1.363  # Propensity to Tiller
        tillerSdSlope = 0.206  # Tiller Supply/demand slope
      sorghumGenotype ATX623xRTX430
        tt_emerg_to_endjuv = 100
        photoperiod_crit1 = 11.5
        photoperiod_crit2 = 13.5
        photoperiod_slope = 13
        tt_endjuv_to_init = 202
        tt_flag_to_flower = 170
        tt_flower_to_start_grain = 80
        tt_flower_to_maturity = 761
        tt_maturity_to_ripe = 1
        main_stem_coef = 2.9
        tpla_prod_coef = 0.018
        dm_per_seed = 0.00083
        x_stem_wt = 0    80
        y_height = 0  2000
        maxGFRate = 0.09
        x_stem_wt = 0    80  # look up table for canopy height
        y_height = 0  2000  # plant canopy height
        aX0 = 0.687  # Largest leaf multiplier
        aMaxS = 22.25  # Largest Leaf Area Slope
        aMaxI = 92.45  # Intercept for Largest leaf calculation
        aMaxVert = 0.3  # Vertical Offset for Largest Leaf Calc
        tillerSdIntercept = -0.265  # Propensity to Tiller
        tillerSdSlope = 0.247  # Tiller Supply/demand slope
      sorghumGenotype A35xQL36
        tt_emerg_to_endjuv = 100
        photoperiod_crit1 = 11.8
        photoperiod_crit2 = 14.0
        photoperiod_slope = 39.7
        tt_endjuv_to_init = 134.4
        tt_flag_to_flower = 170
        tt_flower_to_start_grain = 80
        tt_flower_to_maturity = 761
        tt_maturity_to_ripe = 1
        main_stem_coef = 2.90
        tpla_prod_coef = 0.018
        dm_per_seed = 0.00083
        x_stem_wt = 0    80
        y_height = 0  2000
        partition_rate_leaf = 0.012
        maxGFRate = 0.09
        x_stem_wt = 0    80  # look up table for canopy height
        y_height = 0  2000  # plant canopy height
        aX0S = 0.60  # Position of largest leaf Slope
        aX0I = 3.58  # Position of largest leaf Intercept
        aMaxS = 42.1  # Area of largest leaf Slope
        aMaxI = -137.4  # Area of largest leaf Intercept
        tillerSdIntercept = 0.329  # Propensity to Tiller
        tillerSdSlope = 0.300  # Tiller Supply/demand slope
      sorghumGenotype QL39xQL36
        tt_emerg_to_endjuv = 100
        photoperiod_crit1 = 11.8
        photoperiod_crit2 = 14
        photoperiod_slope = 39.7
        tt_endjuv_to_init = 114.4
        tt_flag_to_flower = 170
        tt_flower_to_start_grain = 80
        tt_flower_to_maturity = 761
        tt_maturity_to_ripe = 1
        main_stem_coef = 2.9
        tpla_prod_coef = 0.018
        dm_per_seed = 0.00083
        x_stem_wt = 0    80
        y_height = 0  2000
        maxGFRate = 0.09
        x_stem_wt = 0    80  # look up table for canopy height
        y_height = 0  2000  # plant canopy height
        aX0S = 0.60  # Position of largest leaf Slope
        aX0I = 3.58  # Position of largest leaf Intercept
        aMaxS = 42.1  # Area of largest leaf Slope
        aMaxI = -137.4  # Area of largest leaf Intercept
        tillerSdIntercept = 0.329  # Propensity to Tiller
        tillerSdSlope = 0.300  # Tiller Supply/demand slope
      sorghumConstants standard
        crop_type = sorghum
        default_crop_class = plant
        stage_names = sowing germination emergence end_of_juvenile floral_initiation flag_leaf flowering start_grain_fill end_grain_fill maturity harvest_ripe end_crop
        stage_code = 1   2   3    4      5     6     7    8    9    10   11   12
        pesw_germ = 0.0  # plant extractable soil water in seedling layer inadequate for germination (mm/mm)
        shoot_lag = 15.0  # time lag before linear coleoptile growth starts (deg days)
        shoot_rate = 0.6  # growing deg day increase with depth for coleoptile (deg day/mm depth)
        twilight = -2.2  # Twilight is defined as the interval between sunrise or sunset and the time when the true
        x_temp = 11 30  42  # cardinal temps.
        y_tt = 0  19   0  # diff
        x_temp_fm = 5.7 23.5
        y_tt_fm = 0   17.8
        leaf_no_at_emerg = 1.0  # (expanded) leaf number at emergence ()
        leaf_no_seed = 4.0  # number of leaf primordia present in seed
        leaf_no_min = 10.0  # minimum leaf number
        leaf_no_max = 40.0  # maximum leaf number
        leaf_init_rate = 21.6  # degree days to initiate each leaf primordium until floral init (deg day)
        leaf_app_rate1 = 41.0  # Growing deg day required to develop the most leaf ligules. (deg day).
        leaf_app_rate2 = 20.0  # Growing deg day required to develop last leaf ligules. (deg day).
        leaf_no_rate_change = 3.5  # Leaf no below flag above which leaf appearance rate changes from rate1 to rate2.
        leaf_app_rate = 41.0  # last leaf ligules. (deg day).
        rue = 1.25  # g bio/MJ Radn radiation use efficiency
        row_spacing_default = 750  # Default rowing spacing used to calculate k
        x_row_spacing = 0.20   0.50   1.00  # Row spacing
        y_extinct_coef = 0.70   0.40   0.40  # extinction coefficient for green leaf
        x_ave_temp = 8 20 35 50  # mean daily temperature
        y_stress_photo = 0  1  1  0  # multiplier on RUE
        dm_leaf_init = 0.1  # leaf weight at emergence (g/plant)
        dm_root_init = 0.1  # root weight at emergence (g/plant)
        dm_stem_init = 0.1  # stem weight at emergence (g/plant)
        stem_trans_frac = 0.20  # fraction of stem used in translocation to grain
        leaf_trans_frac = 0.15  # fraction of leaf used in translocation to grain
        retransRate = 0.15
        ratio_root_shoot = 0   0   1    1     0.33  0.33  0.087  0    0     0    0    0
        partition_rate_leaf = 0.006  # coefficient of sigmoidal function between leaf partition fraction and internode no**2 (0-1)
        frac_stem2flower = 0.30  # fraction of dm allocated to stem that goes to developing head
        grn_water_cont = 0.130  # water content of grain g/g
        GrainTempWindow = -150 50
        GrainTempOrdinals = 36 40
        leaf_no_correction = 1.52  # corrects for other growing leaves
        x_lai = 0.1    4
        y_lai_sla_max = 50000 25000  # maximum specific leaf area for delta LAI
        lai_sla_min = 8000  8000  # minimum specific leaf area for delta LAI
        sla_max = 45000
        sla_min = 8000  # minimum specific leaf area for new leaf area
        initial_tpla = 200.0  # initial total plant leaf area
        tiller_coef = 0.66  # exponent for determining leaf area on each additional tiller
        tpla_inflection_ratio = 0.66  # inflection coefficient of TPLA curve
        height_max = 3500.0  # maximum canopy height
        height_stem_slope = 250.0  # rate of height growth (mm/g/stem)
        root_depth_rate = 0 27.0  27.0  27.0 27.0  27.0   27.0   0      0       0    0    0  # mm/day.
        x_sw_ratio = 0   0.25  # water availability for effects on root depth growth
        y_sw_fac_root = 0   1  # stress factor for root depth growth, This may be probably the same for all crops
        initial_root_depth = 50  # initial depth of roots (mm)
        specific_root_length = 100000
        x_plant_rld = 0.0  0.1  # root branching
        y_rel_root_rate = 1.0  1.0
        transp_eff_cf = 0.009
        svp_fract = 0.75  # (0-1)
        x_sw_demand_ratio = 0.1 1.1  # water availability This is the original value
        y_swdef_leaf = 0   1  # stress indices
        x_sw_avail_ratio = 0 0.2 1.0  # water availability Needs to be severe to worry phenology
        y_swdef_pheno = 0 1.0 1.0  # stress indices
        no3_diffn_const = 2.0
        maxUptakeRate = 0.029
        initialRootNConc = 0.020
        targetRootNConc = 0.002
        initialLeafSLN = 1.5
        targetLeafSLN = 1.5
        newLeafSLN = 1.0
        leafDilnNSlope = 0.0043
        leafDilnNInt = -0.0017
        initialStemNConc = 0.01
        x_stem_n = 3         5       7         10
        targetStemNConc = 0.055   0.016   0.01      0.005
        structStemNConc = 0.012  0.012   0.005   0.0015
        stemDilnNSlope = 0.0062
        stemDilnNInt = -0.001
        initialRachisNConc = 0.000
        targetRachisNConc = 0.01
        structRachisNConc = 0.003
        rachisDilnNSlope = 0.0062
        rachisDilnNInt = -0.001
        grainFillRate = 0.001
        targetGrainNConc = 0.0175
        grainFillIntercept = 0.0000319
        grainFillSlope = 0.4026
        nUptakeCease = 570
        nSupplyFrac = 5
        dm_root_sen_frac = 0.002  # fraction of root dry matter senesced each day
        lai_sen_light = 4.0  # induced senescence occurs (m^2/m^2)
        sen_light_slope = 0.008  # sensitivity of leaf area senescence to shading
        x_temp_senescence = 0.0 6.0  # minimum temperature for frost senescence table (oC)
        y_senescence_fac = 1   0  # daily fraction of leaf area senesced due to frost (0-1)
        sen_rate_water = 0.05  # slope in linear eqn relating soil water stress during photosynthesis to leaf senesence rate
        dead_detach_frac = 0 0 0 0 0  # fraction detached from each part of a dead plant per day.
        dm_leaf_detach_frac = 0
        sen_light_time_const = 10.0  # delay factor for light senescence
        sen_radn_crit = 2  # radiation level for onset of light senescence
        frost_kill = 1.0  # temperature threshold for leaf death
        sen_water_time_const = 10.0  # delay factor for water senescence
        sen_threshold = 0.25  # supply:demand ratio for onset of water senescence
        spla_slope = 81.5  # regression slope for calculating inflection point for leaf senescence
        tt_emerg_limit = 150.0  # maximum degree days allowed for emergence to take place
        days_germ_limit = 40.0  # maximum days allowed after sowing for germination to take place (days)
        swdf_photo_limit = 99.0  # critical cumulative photosynthesis water stress, above which the crop partly fails (unitless)
        swdf_photo_rate = 0.0  # rate of plant reduction with photosynthesis water stress
        swdf_pheno_limit = 99.0  # critical cumulative phenology water stress, above which the crop fails (unitless)
        x_weighted_temp = 55.0  60.0
        y_plant_death = 0.0   1.0
        stress_determinants = leaf stem grain
        yield_parts = grain
        retrans_parts = leaf stem  flower
        pfact_photo_slope = 2.5
        pfact_expansion_slope = 2.5
        pfact_pheno_slope = 100
        pfact_grain_slope = 20
        p_uptake_factor = 1.5  # factor to calc total P uptake from demand for today's growth
        x_p_stage_code = 3       4      5      6      7      8      10
        y_p_conc_max_leaf = 0.0059  0.0054 0.0040 0.0029 0.0026 0.0025 0.0022
        y_p_conc_min_leaf = 0.003   0.003  0.0029 0.0011 0.0011 0.0008 0.0006
        y_p_conc_sen_leaf = 0.0005  0.0005 0.0005 0.0005 0.0005 0.0005 0.0005
        y_p_conc_max_stem = 0.0057  0.0038 0.0037 0.0018 0.0016 0.0013 0.0013
        y_p_conc_min_stem = 0.003   0.003  0.002  0.0006 0.0006 0.0002 0.0002
        y_p_conc_sen_stem = 0.0002  0.0002 0.0002 0.0002 0.0002 0.0002 0.0002
        y_p_conc_max_root = 0.0010  0.0010 0.0010 0.0010 0.0010 0.0010 0.0010  # assume P conc in roots non-varying
        y_p_conc_min_root = 0.0010  0.0010 0.0010 0.0010 0.0010 0.0010 0.0010
        y_p_conc_sen_root = 0.0010  0.0010 0.0010 0.0010 0.0010 0.0010 0.0010
        y_p_conc_max_flower = 0.0057  0.0038 0.0037 0.0018 0.0016 0.0013 0.0013  # assumed same as stem
        y_p_conc_min_flower = 0.003   0.003  0.002  0.0006 0.0006 0.0002 0.0002
        y_p_conc_sen_flower = 0.0002  0.0002 0.0002 0.0002 0.0002 0.0002 0.0002
        y_p_conc_max_grain = 0.001   0.001  0.001  0.001  0.052  0.0044  0.0034
        y_p_conc_min_grain = 0.001   0.001  0.001  0.001  0.001  0.0015  0.0015  # based on Kenya maize data
        y_p_conc_sen_grain = 0.001   0.001  0.001  0.001  0.001  0.0015  0.0015
        y_p_conc_max_energy = 0.001   0.001  0.001  0.001  0.001  0.001  0.001
        y_p_conc_min_energy = 0.001   0.001  0.001  0.001  0.001  0.001  0.001
        y_p_conc_sen_energy = 0.001   0.001  0.001  0.001  0.001  0.001  0.001
        p_conc_init_leaf = 0.0059
        p_conc_init_stem = 0.0057
        p_conc_init_root = 0.010
        p_conc_init_flower = 0.0057
        p_conc_init_grain = 0.0052
        p_conc_init_energy = 0.0
        ll_ub = 1000.0  # upper limit of lower limit
        kl_ub = 1.0  # upper limit of water uptake factor
        minsw = 0.00001  # lowest acceptable value for ll
        latitude_ub = 90  # latitude upper limit
        latitude_lb = -90  # latitude lower limit
        maxt_ub = 55  # max. temperature upper limit
        maxt_lb = 0  # max. temperature lower limit
        mint_ub = 40  # min. temperature upper limit
        mint_lb = -10  # min. temperature lower limit
        radn_ub = 50  # radiation upper limit
        radn_lb = 1  # radiation lower limit
        dlayer_ub = 1000  # layer depth upper limit
        dlayer_lb = 0  # layer depth lower limit
        dul_dep_ub = 1000  # drained upper limit upper limit
        dul_dep_lb = 0  # drained upper limit lower limit
        sw_dep_ub = 1000  # soil water upper limit
        sw_dep_lb = 0  # soil water lower limit
        sw_ub = 1.0  # soil water upper limit
        sw_lb = 0.0  # soil water upper limit
        no3_ub = 10000  # soil nitrate upper limit
        no3_lb = 0  # soil nitrate lower limit
        no3_min_ub = 10000  # min. soil nitrate upper limit
        no3_min_lb = 0  # min. soil nitrate lower limit
        nh4_ub = 10000  # soil nitrate upper limit
        nh4_lb = 0  # soil nitrate lower limit
        nh4_min_ub = 10000  # min. soil nitrate upper limit
        nh4_min_lb = 0  # min. soil nitrate lower limit
        head_grain_no_max_ub = 45000.0  # upper limit !NOT USED
        grain_gth_rate_ub = 20.0  # upper limit !NOT USED
        tt_emerg_to_endjuv_ub = 500.0  # upper limit
        pp_endjuv_to_init_ub = 200.0  # upper limit oC h-1
        tt_flower_to_maturity_ub = 1000.0  # upper limit
        tt_maturity_to_ripe_ub = 1000.0  # upper limit
        tt_flower_to_start_grain_ub = 1000.0  # upper limit
        tt_flag_to_flower_ub = 1000.0  # upper limit
        senescedLeafSLN = 0.0
        leaf_area_calc_type = bellcurve  # Canopy calculation
        tillerSlaBound = 10  # SLA Range (%)
        maxLAIForTillerAddition = 0.325  # Max Linear LAI for tillers
      sorghumGenotype QL41xQL36
        tt_emerg_to_endjuv = 100
        photoperiod_crit1 = 11.5
        photoperiod_crit2 = 13.5
        photoperiod_slope = 12.5
        tt_endjuv_to_init = 179
        tt_flag_to_flower = 170
        tt_flower_to_start_grain = 80
        tt_flower_to_maturity = 761
        tt_maturity_to_ripe = 1
        main_stem_coef = 2.9
        tpla_prod_coef = 0.018
        dm_per_seed = 0.00083
        x_stem_wt = 0    80
        y_height = 0  2000
        maxGFRate = 0.09
        x_stem_wt = 0    80  # look up table for canopy height
        y_height = 0  2000  # plant canopy height
        aX0 = 0.687  # Largest leaf multiplier
        aMaxS = 22.25  # Largest Leaf Area Slope
        aMaxI = 92.45  # Intercept for Largest leaf calculation
        aMaxVert = 0.3  # Vertical Offset for Largest Leaf Calc
        tillerSdIntercept = -0.265  # Propensity to Tiller
        tillerSdSlope = 0.247  # Tiller Supply/demand slope
      sorghumGenotype Buster
        tt_emerg_to_endjuv = 100
        photoperiod_crit1 = 11.5
        photoperiod_crit2 = 13.5
        photoperiod_slope = 11.5
        tt_endjuv_to_init = 160
        tt_flag_to_flower = 170
        tt_flower_to_start_grain = 80
        tt_flower_to_maturity = 761
        tt_maturity_to_ripe = 1
        main_stem_coef = 2.9
        tpla_prod_coef = 0.018
        dm_per_seed = 0.00083
        x_stem_wt = 0    80
        y_height = 0  2000
        maxGFRate = 0.09
        x_stem_wt = 0    80  # look up table for canopy height
        y_height = 0  2000  # plant canopy height
        aX0S = 0.60  # Position of largest leaf Slope
        aX0I = 3.58  # Position of largest leaf Intercept
        aMaxS = 42.1  # Area of largest leaf Slope
        aMaxI = -137.4  # Area of largest leaf Intercept
        tillerSdIntercept = 0.329  # Propensity to Tiller
        tillerSdSlope = 0.300  # Tiller Supply/demand slope
      sorghumGenotype M35-2
        tt_emerg_to_endjuv = 100
        photoperiod_crit1 = 11.5
        photoperiod_crit2 = 13.5
        photoperiod_slope = 61
        tt_endjuv_to_init = 252
        tt_flag_to_flower = 170
        tt_flower_to_start_grain = 80
        tt_flower_to_maturity = 761
        tt_maturity_to_ripe = 1
        main_stem_coef = 2.82
        tpla_prod_coef = 0.011
        dm_per_seed = 0.00142784
        x_stem_wt = 0    80
        y_height = 0  2000
        partition_rate_leaf = 0.018
        nUptakeCease = 10
        leaf_init_rate = 26.1
        targetLeafSLN = 1.2
        maxGFRate = 0.09
        x_stem_wt = 0    80  # look up table for canopy height
        y_height = 0  2000  # plant canopy height
        aX0 = 0.687  # Largest leaf multiplier
        aMaxS = 22.25  # Largest Leaf Area Slope
        aMaxI = 92.45  # Intercept for Largest leaf calculation
        aMaxVert = 0.3  # Vertical Offset for Largest Leaf Calc
        tillerSdIntercept = 0.329  # Propensity to Tiller
        tillerSdSlope = 0.300  # Tiller Supply/demand slope
      sorghumGenotype CSH13R
        tt_emerg_to_endjuv = 100
        photoperiod_crit1 = 11.5
        photoperiod_crit2 = 13.5
        photoperiod_slope = 17
        tt_endjuv_to_init = 228
        tt_flag_to_flower = 170
        tt_flower_to_start_grain = 80
        tt_flower_to_maturity = 761
        tt_maturity_to_ripe = 1
        main_stem_coef = 2.95
        tpla_prod_coef = 0.014
        dm_per_seed = 0.0015
        x_stem_wt = 0    80
        y_height = 0  2000
        rue = 1.6
        partition_rate_leaf = 0.018
        targetLeafSLN = 1.2
        leaf_init_rate = 23.2
        maxGFRate = 0.09
        x_stem_wt = 0    80  # look up table for canopy height
        y_height = 0  2000  # plant canopy height
        aX0 = 0.687  # Largest leaf multiplier
        aMaxS = 22.25  # Largest Leaf Area Slope
        aMaxI = 92.45  # Intercept for Largest leaf calculation
        aMaxVert = 0.3  # Vertical Offset for Largest Leaf Calc
        tillerSdIntercept = -0.818  # Propensity to Tiller
        tillerSdSlope = 0.159  # Tiller Supply/demand slope
        aTillerVert = 0.05  # Additional Vertical Offset for each additional Tiller
  simulation Sorghum_Gatton_RUE_7
    clock
      start_date = 22/11/1999  # Select the start date of the simulation
      end_date = 3/04/2000  # Select the end date of the simulation
    summaryfile
    metfile met: filename=Gatton_RUE.met
    area paddock
      outputfile: filename=Sorghum_Gatton_RUE_7.out; title=Sorghum_Gatton_RUE_7; events=My Variables Events
        variables My Variables -> /Gatton_RUE/shared/My Variables
      folder Manager folder
        manager Sow SkipRow on a fixed date
          # Sowing criteria
          date = 2/12/1999  # Enter sowing date (d/m/yyyy)
          # Sowing parameters
          crop = Sorghum  # Enter name of crop to sow
          density = 10  # Enter sowing density (plants/m2)
          depth = 40  # Enter sowing depth (mm)
          cultivar = CSH13R  # Enter cultivar
          row_spacing = 0.5  # Enter row spacing (m)
          RowConfiguration = solid  # Enter skip row configuration
          ftn = 0.9  # Enter Fertile Tiller No.
          on start_of_day:
```
            if (paddock_is_fallow() = 1 and today = date('[date]')) then
              [crop] sow plants =[density], sowing_depth = [depth], cultivar = [cultivar], row_spacing = [row_spacing], skip = [RowConfiguration], tiller_no_fertile = [ftn] ()
            endif
            if (paddock_is_fallow() = 0) then
               outputfile do_output
            endif
```
        manager Harvesting rule
          # Harvesting criteria
          crop = Sorghum  # Enter name of crop to harvest when ripe
          on end_of_day:
```
           if [crop].StageName = 'harvest_ripe' or [crop].plant_status = 'dead' then
              [crop]  harvest
              [crop]  end_crop
           endif
```
      Soil Ian's Paddock: LocalName=Gatton RS; Site=Gatton RS; Region=Gatton
        SoilType = LawesBlackVertosol  # Soil description
        NearestTown = Unknown
        NaturalVegetation = Unknown
        InitialWater Initial water: FractionFull=1.00; PercentMethod=FilledFromTop
        Water
          Thickness  BD     AirDry  LL15   DUL    SAT
          150        1.320  0.100   0.260  0.410  0.460
          150        1.300  0.150   0.260  0.430  0.480
          300        1.230  0.250   0.260  0.460  0.510
          300        1.270  0.260   0.260  0.440  0.490
          300        1.370  0.250   0.250  0.400  0.450
          300        1.350  0.280   0.280  0.410  0.460
          300        1.350  0.310   0.310  0.380  0.430
          SoilCrop Sorghum: LL=[0.260, 0.260, 0.260, 0.260, 0.250, 0.280, 0.310]; KL=[0.080, 0.080, 0.080, 0.080, 0.060, 0.040, 0.020]; XF=[1, 1, 1, 1, 1, 1, 1]
        SoilWater: SummerCona=3.5; SummerU=6; SummerDate=1-Nov; WinterCona=3.5; WinterU=6; WinterDate=1-Apr; DiffusConst=88; DiffusSlope=35.4; Salb=0.13; CN2Bare=91; CNRed=20; CNCov=0.8; Thickness=[150, 150, 300, 300, 300, 300, 300]; SWCON=[0.500, 0.500, 0.500, 0.500, 0.500, 0.500, 0.500]
        SoilOrganicMatter: RootCN=30; RootWt=1500; SoilCN=12.5; EnrACoeff=7.4; EnrBCoeff=0.2
          Thickness  OC     FBiom  FInert
          150        1.300  0.030  0.310
          150        0.650  0.010  0.380
          300        0.320  0      0.470
          300        0.110  0      0.700
          300        0.110  0      0.900
          300        0.110  0      0.950
          300        0.110  0      0.950
        Analysis: Thickness=[150, 150, 300, 300, 300, 300, 300]; PH=[8.200, 8.700, 8.900, 8.100, 8, 8, 8]
        Sample Initial nitrogen
          Thickness  NO3    NH4
          150        9.202  0.100
          150        4.403  0.100
          300        2.239  0.100
          300        1.237  0.100
          300        1.266  0.100
          300        1.770  0.100
          300        2.064  0.100
      irrigation
        automatic_irrigation = off  # switch
        asw_depth = 600.0  # Depth to which ASW is calculated. (mm)
        crit_fr_asw = 0.5  # Fraction of ASW below which irrigation is applied (0-1.0)
        irrigation_efficiency = 1.0  # Efficiency of the irrigation. (0-1.0)
        default_no3_conc = 0.0  # Nitrate concentration (ppm N)
        default_nh4_conc = 0.0  # Ammonium concentration (ppm N)
        default_cl_conc = 0.0  # Chloride concentration (ppm Cl)
      fertiliser
      operations
        3/12/1999  Irrigation apply amount = 17
        6/12/1999  Irrigation apply amount = 20
        17/12/1999  Irrigation apply amount = 20
        7/01/2000  Irrigation apply amount = 10
        14/01/2000  Irrigation apply amount = 48
        27/01/2000  Irrigation apply amount = 21
        4/02/2000  Irrigation apply amount = 17
        11/02/2000  Irrigation apply amount = 30
        25/02/2000  Irrigation apply amount = 41
        3/03/2000  Irrigation apply amount = 15
        29/11/1999  fertiliser apply amount = 117 (kg/ha), depth = 50 (mm), type = NO3_N ()
        7/01/2000  fertiliser apply amount = 119 (kg/ha), depth = 50 (mm), type = NO3_N ()
        11/02/2000  fertiliser apply amount = 119 (kg/ha), depth = 50 (mm), type = NO3_N ()
        28/11/1999  fertiliser apply amount = 0 (kg/ha), depth = 50 (mm), type = NO3_N ()
        27/11/1999  fertiliser apply amount = 0 (kg/ha), depth = 50 (mm), type = NO3_N ()
      sorghum -> /Gatton_RUE/shared/sorghum
  simulation Sorghum_Gatton_RUE_8
    clock
      start_date = 22/11/1999  # Select the start date of the simulation
      end_date = 3/04/2000  # Select the end date of the simulation
    summaryfile
    metfile met: filename=Gatton_RUE.met
    area paddock
      outputfile: filename=Sorghum_Gatton_RUE_8.out; title=Sorghum_Gatton_RUE_8; events=My Variables Events
        variables My Variables -> /Gatton_RUE/shared/My Variables
      folder Manager folder
        manager Sow SkipRow on a fixed date
          # Sowing criteria
          date = 2/12/1999  # Enter sowing date (d/m/yyyy)
          # Sowing parameters
          crop = Sorghum  # Enter name of crop to sow
          density = 10  # Enter sowing density (plants/m2)
          depth = 40  # Enter sowing depth (mm)
          cultivar = A35xQL36  # Enter cultivar
          row_spacing = 0.5  # Enter row spacing (m)
          RowConfiguration = solid  # Enter skip row configuration
          ftn = 0.2  # Enter Fertile Tiller No.
          on start_of_day:
          script: same as in Sorghum_Gatton_RUE_7.paddock.Manager folder.Sow SkipRow on a fixed date
        manager Harvesting rule
          # Harvesting criteria
          crop = Sorghum  # Enter name of crop to harvest when ripe
          on end_of_day:
          script: same as in Sorghum_Gatton_RUE_7.paddock.Manager folder.Harvesting rule
      Soil Ian's Paddock: SoilType=LawesBlackVertosol; LocalName=Gatton RS; Site=Gatton RS; NearestTown=Unknown; Region=Gatton; NaturalVegetation=Unknown; Latitude=0; Longitude=0; YearOfSampling=0
        InitialWater Initial water: FractionFull=1.00; PercentMethod=FilledFromTop
        Water: same as Sorghum_Gatton_RUE_7.paddock.Ian's Paddock.Water
        SoilWater: same as Sorghum_Gatton_RUE_7.paddock.Ian's Paddock.SoilWater
        SoilOrganicMatter: same as Sorghum_Gatton_RUE_7.paddock.Ian's Paddock.SoilOrganicMatter
        Analysis: Thickness=[150, 150, 300, 300, 300, 300, 300]; PH=[8.200, 8.700, 8.900, 8.100, 8, 8, 8]
        Sample Initial nitrogen
          Thickness  NO3    NH4
          150        9.202  0.100
          150        4.403  0.100
          300        2.239  0.100
          300        1.237  0.100
          300        1.266  0.100
          300        1.770  0.100
          300        2.064  0.100
      irrigation: same as Sorghum_Gatton_RUE_7.paddock.Irrigation
      fertiliser
      operations: same as Sorghum_Gatton_RUE_7.paddock.operations
      sorghum -> /Gatton_RUE/shared/sorghum
  simulation Sorghum_Gatton_RUE_9
    clock
      start_date = 22/11/1999  # Select the start date of the simulation
      end_date = 3/04/2000  # Select the end date of the simulation
    summaryfile
    metfile met: filename=Gatton_RUE.met
    area paddock
      outputfile: filename=Sorghum_Gatton_RUE_9.out; title=Sorghum_Gatton_RUE_9; events=My Variables Events
        variables My Variables -> /Gatton_RUE/shared/My Variables
      folder Manager folder
        manager Sow SkipRow on a fixed date
          # Sowing criteria
          date = 2/12/1999  # Enter sowing date (d/m/yyyy)
          # Sowing parameters
          crop = sorghum  # Enter name of crop to sow
          density = 10  # Enter sowing density (plants/m2)
          depth = 40  # Enter sowing depth (mm)
          cultivar = QL39xQL36  # Enter cultivar
          row_spacing = 0.5  # Enter row spacing (m)
          RowConfiguration = solid  # Enter skip row configuration
          ftn = 0.9  # Enter Fertile Tiller No.
          on start_of_day:
          script: same as in Sorghum_Gatton_RUE_7.paddock.Manager folder.Sow SkipRow on a fixed date
        manager Harvesting rule
          # Harvesting criteria
          crop = Sorghum  # Enter name of crop to harvest when ripe
          on end_of_day:
          script: same as in Sorghum_Gatton_RUE_7.paddock.Manager folder.Harvesting rule
      Soil Ian's Paddock: same as Sorghum_Gatton_RUE_7.paddock.Ian's Paddock
      irrigation: same as Sorghum_Gatton_RUE_7.paddock.Irrigation
      fertiliser
      operations: same as Sorghum_Gatton_RUE_7.paddock.operations
      sorghum -> /Gatton_RUE/shared/sorghum
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