folder Breeders 2010: version=37; creator=Apsim 7.10-r0
  simulation Sorghum_LE9_Pioneer S34-16
    metfile met: filename=LE9.met
    clock
      start_date = 1/01/1995  # Enter the start date of the simulation
      end_date = 30/05/1995  # Enter the end date of the simulation
    summaryfile
    area paddock
      Soil Peter's: LocalName=Lawes; Site=Lawes; Region=Lockyer Valley
        SoilType = Lawesloam  # Soil description
        NearestTown = Unknown
        NaturalVegetation = Unknown
        Water
          Thickness  BD    AirDry  LL15  DUL   SAT
          200        1.32  0       0.3   0.41  0.46
          200        1.3   0       0.3   0.43  0.48
          200        1.23  0       0.35  0.46  0.51
          300        1.27  0       0.32  0.44  0.49
          300        1.37  0       0.29  0.4   0.45
          300        1.35  0       0.31  0.41  0.46
          300        1.35  0       0.31  0.38  0.43
          SoilCrop Sorghum: LL=[0.3, 0.3, 0.35, 0.32, 0.29, 0.31, 0.31]; KL=[0.07, 0.07, 0.07, 0.05, 0.05, 0.04, 0.03]; XF=[1, 1, 1, 1, 1, 1, 1]
        SoilWater: SummerCona=3.5; SummerU=6; SummerDate=1-Nov; WinterCona=3.5; WinterU=6; WinterDate=1-Apr; DiffusConst=88; DiffusSlope=35.4; Salb=0.13; CN2Bare=91; CNRed=20; CNCov=0.8; Thickness=[200, 200, 200, 300, 300, 300, 300]; SWCON=[0.5, 0.5, 0.5, 0.5, 0.5, 0.5, 0.5]
        SoilOrganicMatter: RootCN=30; RootWt=1500; SoilCN=12.5; EnrACoeff=7.4; EnrBCoeff=0.2
          Thickness  OC    FBiom  FInert
          200        1.8   0.05   0.39
          200        1.2   0.02   0.47
          200        1     0.01   0.52
          300        1     0.01   0.62
          300        0.71  0.01   0.74
          300        0.34  0.01   0.83
          300        0.26  0.01   0.93
        Analysis
          Thickness  EC   PH
          200        0.2  6.9
          200        0.2  7
          200        0.2  7
          300        0.2  8
          300        0.2  8
          300        0.2  8
          300        0.2  8
        Sample Initial soil
          Thickness  NO3    NH4  SW
          200        53.27  0.1  0.342
          200        19.07  0.1  0.416
          200        1.66   0.1  0.445
          300        0      0.1  0.429
          300        0      0.1  0.388
          300        0      0.1  0.407
          300        0      0.1  0.395
      surfaceom SurfaceOrganicMatter
        PoolName = wheat  # Organic Matter pool name
        type = wheat  # Organic Matter type
        mass = 1000  # Initial surface residue (kg/ha)
        cnr = 80  # C:N ratio of initial residue
        standing_fraction = 0  # Fraction of residue standing
      fertiliser
      sorghum
      folder Manager folder
        manager Sow on a fixed date
          # Sowing criteria
          date = 12/01/1995  # Enter sowing date (dd-mmm)
          # Sowing parameters
          crop = sorghum  # Enter name of crop to sow
          density = 16  # Enter sowing density (plants/m2)
          depth = 30  # Enter sowing depth (mm)
          cultivar = pioneer_s34  # Enter cultivar
          class = plant  # Enter crop growth class
          row_spacing = 0.5  # Enter row spacing (mm)
          skiprow = solid
          ftn = 0.4  # Enter Fertile Tiller Number
          on start_of_day:
```
        if (today = date('[date]') then
              [crop] sow plants =[density], sowing_depth = [depth], cultivar = [cultivar], row_spacing = [row_spacing], crop_class = [class], tiller_no_fertile = [ftn]
         endif
if (paddock_is_fallow() = 0) then 
   outputfile do_output
endif
```
        manager Harvesting rule
          # Harvesting criteria
          crop = sorghum  # Enter name of crop to harvest when ripe
          on end_of_day:
```
           if [crop].StageName = 'harvest_ripe' or [crop].plant_status = 'dead' then
              [crop]  harvest
              [crop]  end_crop
           endif
```
      outputfile: filename=Sorghum_LE9_Pioneer S34-16.out; title=Sorghum_LE9_Pioneer S34-16
        variables
          variable:
            dd/mm/yyyy as date  # Date (dd/mm/yyyy)
            DaysAfterSowing  # Days after sowing
            sw_dep()
            ll15_dep()
            dul_dep()
            WaterSD
            Biomass  # Total above-ground biomass
            yield
            lai
            GrainNo
            stage
            biomass_wt  # Total above-ground biomass
            GrainGreenWt  # Live grain dry weight
            RachisGreenWt  # Live rachis dry weight
            StemGreenWt  # Stem dry weight
            GrainSize  # 1000 grain weight
            LeafSenescedWt  # Senesced leaf dry weight
            TillerNoFertile
            Leafno
      operations Operations Schedule
        12/01/1995  Irrigation apply amount = 22
        13/01/1995  Irrigation apply amount = 16
        16/01/1995  Irrigation apply amount = 8
        24/01/1995  Irrigation apply amount = 8
        25/01/1995  Irrigation apply amount = 6
        3/02/1995  Irrigation apply amount = 11
        8/02/1995  Irrigation apply amount = 32
        8/03/1995  Irrigation apply amount = 27
        17/03/1995  Irrigation apply amount = 8
        22/03/1995  Irrigation apply amount = 16
        5/04/1995  Irrigation apply amount = 24
        4/01/1995  fertiliser apply amount = 0 (kg/ha), depth = 50 (mm), type = NO3_N ()
        4/01/1995  fertiliser apply amount = 0 (kg/ha), depth = 50 (mm), type = NO3_N ()
        11/01/1995  fertiliser apply amount = 105 (kg/ha), depth = 50 (mm), type = NO3_N ()
        8/02/1995  fertiliser apply amount = 59 (kg/ha), depth = 50 (mm), type = NO3_N ()
        8/03/1995  fertiliser apply amount = 59 (kg/ha), depth = 50 (mm), type = NO3_N ()
      irrigation
        automatic_irrigation = off
        asw_depth = 600  # Depth to which ASW is calculated. (mm)
        crit_fr_asw = 0.5  # Fraction of ASW below which irrigation is applied (0-1.0)
        irrigation_efficiency = 1  # Efficiency of the irrigation. (0-1.0)
        irrigation_allocation = off  # Allocation limits
        allocation = 0  # Allocation in mm
        default_no3_conc = 0.0  # Nitrate concentration (ppm N)
        default_nh4_conc = 0.0  # Ammonium concentration (ppm N)
        default_cl_conc = 0.0  # Chloride concentration (ppm Cl)
  simulation Sorghum_LE9_Pioneer S34-8
    metfile met: filename=LE9.met
    clock
      start_date = 1/01/1995  # Enter the start date of the simulation
      end_date = 30/05/1995  # Enter the end date of the simulation
    summaryfile
    area paddock
      Soil Peter's: same as Sorghum_LE9_Pioneer S34-16.paddock.Peter's
      surfaceom SurfaceOrganicMatter
        PoolName = wheat  # Organic Matter pool name
        type = wheat  # Organic Matter type
        mass = 1000  # Initial surface residue (kg/ha)
        cnr = 80  # C:N ratio of initial residue
        standing_fraction = 0  # Fraction of residue standing
      fertiliser
      sorghum
      folder Manager folder
        manager Sow on a fixed date
          # Sowing criteria
          date = 12/01/1995  # Enter sowing date (dd-mmm)
          # Sowing parameters
          crop = sorghum  # Enter name of crop to sow
          density = 8  # Enter sowing density (plants/m2)
          depth = 30  # Enter sowing depth (mm)
          cultivar = pioneer_s34  # Enter cultivar
          class = plant  # Enter crop growth class
          row_spacing = 0.5  # Enter row spacing (mm)
          skiprow = solid
          ftn = 1.3  # Enter Fertile Tiller Number
          on start_of_day:
          script: same as in Sorghum_LE9_Pioneer S34-16.paddock.Manager folder.Sow on a fixed date
        manager Harvesting rule
          # Harvesting criteria
          crop = sorghum  # Enter name of crop to harvest when ripe
          on end_of_day:
          script: same as in Sorghum_LE9_Pioneer S34-16.paddock.Manager folder.Harvesting rule
      outputfile: filename=Sorghum_LE9_Pioneer S34-8.out; title=Sorghum_LE9_Pioneer S34-8
        variables: same as Sorghum_LE9_Pioneer S34-16.paddock.outputfile.Variables
      operations Operations Schedule: same as Sorghum_LE9_Pioneer S34-16.paddock.Operations Schedule
      irrigation: same as Sorghum_LE9_Pioneer S34-16.paddock.Irrigation
  simulation Sorghum_LE9_Rs671-16
    metfile met: filename=LE9.met
    clock
      start_date = 1/01/1995  # Enter the start date of the simulation
      end_date = 30/05/1995  # Enter the end date of the simulation
    summaryfile
    area paddock
      Soil Peter's: same as Sorghum_LE9_Pioneer S34-16.paddock.Peter's
      surfaceom SurfaceOrganicMatter
        PoolName = wheat  # Organic Matter pool name
        type = wheat  # Organic Matter type
        mass = 1000  # Initial surface residue (kg/ha)
        cnr = 80  # C:N ratio of initial residue
        standing_fraction = 0  # Fraction of residue standing
      fertiliser
      sorghum
      folder Manager folder
        manager Sow on a fixed date
          # Sowing criteria
          date = 12/01/1995  # Enter sowing date (dd-mmm)
          # Sowing parameters
          crop = sorghum  # Enter name of crop to sow
          density = 16  # Enter sowing density (plants/m2)
          depth = 30  # Enter sowing depth (mm)
          cultivar = texas_671  # Enter cultivar
          class = plant  # Enter crop growth class
          row_spacing = 0.5  # Enter row spacing (mm)
          skiprow = solid
          ftn = 0.01  # Enter Fertile Tiller Number
          on start_of_day:
          script: same as in Sorghum_LE9_Pioneer S34-16.paddock.Manager folder.Sow on a fixed date
        manager Harvesting rule
          # Harvesting criteria
          crop = sorghum  # Enter name of crop to harvest when ripe
          on end_of_day:
          script: same as in Sorghum_LE9_Pioneer S34-16.paddock.Manager folder.Harvesting rule
      outputfile: filename=Sorghum_LE9_Rs671-16.out; title=Sorghum_LE9_Rs671-16
        variables: same as Sorghum_LE9_Pioneer S34-16.paddock.outputfile.Variables
      operations Operations Schedule: same as Sorghum_LE9_Pioneer S34-16.paddock.Operations Schedule
      irrigation: same as Sorghum_LE9_Pioneer S34-16.paddock.Irrigation
  simulation Sorghum_LE9_Rs671-8
    metfile met: filename=LE9.met
    clock
      start_date = 1/01/1995  # Enter the start date of the simulation
      end_date = 30/05/1995  # Enter the end date of the simulation
    summaryfile
    area paddock
      Soil Peter's: same as Sorghum_LE9_Pioneer S34-16.paddock.Peter's
      surfaceom SurfaceOrganicMatter
        PoolName = wheat  # Organic Matter pool name
        type = wheat  # Organic Matter type
        mass = 1000  # Initial surface residue (kg/ha)
        cnr = 80  # C:N ratio of initial residue
        standing_fraction = 0  # Fraction of residue standing
      fertiliser
      sorghum
      folder Manager folder
        manager Sow on a fixed date
          # Sowing criteria
          date = 12/01/1995  # Enter sowing date (dd-mmm)
          # Sowing parameters
          crop = sorghum  # Enter name of crop to sow
          density = 8  # Enter sowing density (plants/m2)
          depth = 30  # Enter sowing depth (mm)
          cultivar = texas_671  # Enter cultivar
          class = plant  # Enter crop growth class
          row_spacing = 0.5  # Enter row spacing (mm)
          skiprow = solid
          ftn = 0.88  # Enter Fertile Tiller Number
          on start_of_day:
          script: same as in Sorghum_LE9_Pioneer S34-16.paddock.Manager folder.Sow on a fixed date
        manager Harvesting rule
          # Harvesting criteria
          crop = sorghum  # Enter name of crop to harvest when ripe
          on end_of_day:
          script: same as in Sorghum_LE9_Pioneer S34-16.paddock.Manager folder.Harvesting rule
      outputfile: filename=Sorghum_LE9_Rs671-8.out; title=Sorghum_LE9_Rs671-8
        variables: same as Sorghum_LE9_Pioneer S34-16.paddock.outputfile.Variables
      operations Operations Schedule: same as Sorghum_LE9_Pioneer S34-16.paddock.Operations Schedule
      irrigation: same as Sorghum_LE9_Pioneer S34-16.paddock.Irrigation
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