folder simulations: version=37; creator=Apsim 7.10-r0
  simulation Solid
    metfile met: filename=%apsim%/Examples/MetFiles/Goond.met
    clock
      start_date = 01/06/1940  # Enter the start date of the simulation
      end_date = 31/07/1941  # Enter the end date of the simulation
    summaryfile
    area paddock
      Soil: LocalName=Waco; Site=Jimbour; Region=South East Queensland
        SoilType = Black Vertosol  # Soil description
        NearestTown = Jimbour, Q 4352
        NaturalVegetation = Grassland, mainly Qld bluegrass
        InitialWater Initial water: FractionFull=1; PercentMethod=FilledFromTop
        Water
          Thickness  BD    AirDry  LL15  DUL   SAT
          150        1.02  0.145   0.29  0.54  0.59
          150        1.03  0.26    0.29  0.53  0.58
          300        1.02  0.29    0.29  0.54  0.59
          300        1.02  0.29    0.29  0.54  0.58
          300        1.06  0.3     0.3   0.52  0.57
          300        1.11  0.31    0.31  0.5   0.55
          300        1.12  0.32    0.32  0.5   0.55
          300        1.15  0.33    0.33  0.48  0.53
          300        1.18  0.34    0.34  0.47  0.52
          300        1.2   0.35    0.35  0.46  0.51
          300        1.25  0.36    0.36  0.44  0.49
          SoilCrop Barley
            LL=[0.29, 0.29, 0.32, 0.38, 0.39, 0.39, 0.41, 0.48, 0.47, 0.46, 0.44]
            KL=[0.1, 0.1, 0.08, 0.06, 0.04, 0.02, 0.01, 0, 0, 0, 0]
            XF=[1, 1, 1, 1, 1, 1, 1, 0, 0, 0, 0]
          SoilCrop Chickpea
            LL=[0.29, 0.29, 0.36, 0.43, 0.51, 0.5, 0.5, 0.48, 0.47, 0.46, 0.44]
            KL=[0.1, 0.1, 0.08, 0.06, 0.04, 0.02, 0.01, 0, 0, 0, 0]
            XF=[1, 1, 1, 1, 1, 1, 1, 0, 0, 0, 0]
          SoilCrop Lucerne
            LL=[0.29, 0.29, 0.29, 0.29, 0.3, 0.31, 0.32, 0.33, 0.34, 0.35, 0.36]
            KL=[0.1, 0.1, 0.1, 0.1, 0.09, 0.09, 0.09, 0.09, 0.09, 0.09, 0.09]
            XF=[1, 1, 1, 1, 1, 1, 1, 1, 1, 1, 1]
          SoilCrop Maize
            LL=[0.29, 0.29, 0.34, 0.34, 0.37, 0.4, 0.42, 0.48, 0.47, 0.46, 0.44]
            KL=[0.1, 0.1, 0.1, 0.08, 0.06, 0.04, 0.02, 0, 0, 0, 0]
            XF=[1, 1, 1, 1, 1, 1, 1, 0, 0, 0, 0]
          SoilCrop Perennial Grass
            LL=[0.29, 0.29, 0.39, 0.41, 0.4, 0.4, 0.41, 0.41, 0.4, 0.4, 0.42]
            KL=[0.1, 0.1, 0.1, 0.1, 0.09, 0.07, 0.05, 0, 0, 0, 0]
            XF=[1, 1, 1, 1, 1, 1, 1, 0, 0, 0, 0]
          SoilCrop Sorghum
            LL=[0.29, 0.29, 0.35, 0.38, 0.4, 0.4, 0.4, 0.48, 0.47, 0.46, 0.44]
            KL=[0.1, 0.1, 0.1, 0.08, 0.06, 0.04, 0.02, 0, 0, 0, 0]
            XF=[1, 1, 1, 1, 1, 1, 1, 0, 0, 0, 0]
          SoilCrop Wheat
            LL=[0.29, 0.29, 0.32, 0.32, 0.35, 0.38, 0.41, 0.48, 0.47, 0.46, 0.44]
            KL=[0.1, 0.1, 0.08, 0.06, 0.04, 0.02, 0.01, 0, 0, 0, 0]
            XF=[1, 1, 1, 1, 1, 1, 1, 0, 0, 0, 0]
        SoilWater: SummerCona=3.5; SummerU=6; SummerDate=1-Nov; WinterCona=3.5; WinterU=6; WinterDate=1-Apr; DiffusConst=40; DiffusSlope=16; Salb=0.13; CN2Bare=73; CNRed=20; CNCov=0.8; Thickness=[150, 150, 300, 300, 300, 300, 300, 300, 300, 300, 300]; SWCON=[0.3, 0.3, 0.3, 0.3, 0.3, 0.3, 0.3, 0.3, 0.3, 0.3, 0.3]
        SoilOrganicMatter: RootCN=40; RootWt=200; SoilCN=12.5; EnrACoeff=7.4; EnrBCoeff=0.2
          Thickness  OC    FBiom  FInert
          150        1.04  0      1
          150        0.89  0      1
          300        0.89  0      1
          300        0.89  0      1
          300        0.77  0      1
          300        0.45  0      1
          300        0.27  0      1
          300        0.22  0      1
          300        0.16  0      1
          300        0.13  0      1
          300        0.12  0      1
        Analysis
          Thickness  EC    PH
          150        0.2   8.4
          150        0.25  8.8
          300        0.31  9
          300        0.4   9.2
          300        0.59  9.2
          300        0.84  9.1
          300        0.93  9
          300        1.01  9
          300        1.06  8.9
          300        1.05  8.9
          300        1.01  8.9
        Sample Initial nitrogen: Thickness=[2000]; NO3=[200]; NH4=[50]; NO3Units=kgha; NH4Units=kgha; SWUnits=Volumetric; OCUnits=Total; PHUnits=Water
      surfaceom SurfaceOrganicMatter
        PoolName = wheat  # Organic Matter pool name
        type = wheat  # Organic Matter type
        mass = 1000  # Initial surface residue (kg/ha)
        cnr = 80  # C:N ratio of initial residue
        standing_fraction = 0  # Fraction of residue standing
      fertiliser
      sorghum
      folder Manager folder
        manager Reset water, nitrogen, surfaceOM and phosphorus on sowing
          # When should a reset be done
          modulename = sorghum  # The module the event is to come from
          eventname = sowing  # On which event should a reset be done
          # Reset details
          soilmodule = Soil  # Name of your soil module
          surfaceommodule = SurfaceOrganicMatter  # Name of your surface organic matter module
          pmodule = Phosphorus  # Name of your phosphorus module
          resetWater = yes  # Reset soil water?
          resetNitrogen = yes  # Reset soil nitrogen?
          resetSurfaceOM = yes  # Reset surface organic matter?
          resetP = no  # Reset phosphorus?
          on [modulename].[eventname]:
```
            resetWater = '[resetWater]'
            resetNitrogen  = '[resetNitrogen]'
            resetSurfaceOM = '[resetSurfaceOM]'
            resetP = '[resetP]'
            if (resetWater = 'yes') then
                '[soilmodule] Water' reset
            endif
            if (resetNitrogen = 'yes') then
                '[soilmodule] Nitrogen' reset
            endif
            if (resetSurfaceOM = 'yes') then
                '[surfaceommodule]' reset
            endif
            if (resetP = 'yes') then
                '[pmodule]' reset
            endif
            if (resetWater = 'yes' or resetNitrogen = 'yes' or resetSurfaceOM = 'yes' or resetP = 'yes') then
               act_mods reseting
            endif
```
        manager Sorghum Sowing with Tillers
          # Sowing criteria
          date1 = 15-oct  # Enter sowing window START date (dd-mmm)
          date2 = 15-oct  # Enter sowing window END date (dd-mmm)
          must_sow = yes  # Must sow?
          raincrit = 30  # Amount of rainfall
          rainnumdays = 3  # Number of days of rainfall
          esw_amount = 200  # Enter minimum allowable available soil water (mm)
          # Sowing parameters
          crop = sorghum  # Enter name of crop to sow
          density = 7  # Enter sowing density (plants/m2)
          depth = 30  # Enter sowing depth (mm)
          cultivar = early  # Enter cultivar
          row_spacing = 750  # Enter row spacing (mm)
          skiprow = solid
          ftn = 3  # Enter Fertile Tiller Number
          on start_of_day:
```
         if (paddock_is_fallow() = 1 and FallowIn <> 'yes' and (NextCrop = 0 or NextCrop = '[crop]')) then
            if (date_within('[date1], [date2]') = 1) then
               if (rain[[rainnumdays]] >= [raincrit] AND esw >= [esw_amount]) OR
                   ('[must_sow]' = 'yes' AND today = date('[date2]'))) THEN
                  ChooseNextCrop = 'yes'   ! for rotations
                  [crop] sow plants =[density], sowing_depth = [depth], cultivar = [cultivar], row_spacing = [row_spacing], skip = [skiprow], tiller_no_fertile = [ftn]
               endif
               if today = date('[date2]') then
                  ChooseNextCrop = 'yes'
               endif
            endif
         endif
```
          on init:
```
               nextcrop = 0
               fallowin = 0
```
          on end_of_day:
```
if (paddock_is_fallow() = 0) then
   outputfile do_output
endif
```
        manager Harvesting rule
          # Harvesting criteria
          crop = sorghum  # Enter name of crop to harvest when ripe
          on end_of_day:
```
           if ([crop].StageName = 'harvest_ripe' or [crop].plant_status = 'dead') then
              [crop]  harvest
              [crop]  end_crop
           endif
```
        manager Fertilise at sowing
          # When should fertiliser be applied
          modulename = sorghum  # On which module should the event come from
          eventname = sowing  # On which event should fertiliser be applied
          # Fertiliser application details
          fertmodule = fertiliser  # Module used to apply the fertiliser
          fert_amount_sow = 150  # Amount of starter fertiliser at sowing (kg/ha)
          fert_type_sow = urea_N  # Sowing fertiliser type
          on [modulename].[eventname]:
```
        [fertmodule] apply amount = [fert_amount_sow] (kg/ha), depth = 50 (mm), type = [fert_type_sow]
```
      outputfile: filename=Solid.out; title=Solid
        variables
          variables: dd/mm/yyyy as Date, biomass, yield, esw, biomass_n
  simulation Single -> /simulations/Solid
    area paddock -> /simulations/Solid/paddock
      folder Manager folder -> /simulations/Solid/paddock/Manager folder
        manager Sorghum Sowing with Tillers
          # Sowing criteria
          date1 = 15-oct  # Enter sowing window START date (dd-mmm)
          date2 = 15-oct  # Enter sowing window END date (dd-mmm)
          must_sow = yes  # Must sow?
          raincrit = 30  # Amount of rainfall
          rainnumdays = 3  # Number of days of rainfall
          esw_amount = 200  # Enter minimum allowable available soil water (mm)
          # Sowing parameters
          crop = sorghum  # Enter name of crop to sow
          density = 7  # Enter sowing density (plants/m2)
          depth = 30  # Enter sowing depth (mm)
          cultivar = early  # Enter cultivar
          row_spacing = 750  # Enter row spacing (mm)
          skiprow = single
          ftn = 3  # Enter Fertile Tiller Number
          on start_of_day:
          script: same as in Solid.paddock.Manager folder.Sorghum Sowing with Tillers
          on init:
```
               nextcrop = 0
               fallowin = 0
```
          on end_of_day:
```
if (paddock_is_fallow() = 0) then
   outputfile do_output
endif
```
      outputfile -> /simulations/Solid/paddock/outputfile: filename=Single.out; title=Single
        variables -> /simulations/Solid/paddock/outputfile/Variables
  simulation Double -> /simulations/Solid
    area paddock -> /simulations/Solid/paddock
      folder Manager folder -> /simulations/Solid/paddock/Manager folder
        manager Sorghum Sowing with Tillers
          # Sowing criteria
          date1 = 15-oct  # Enter sowing window START date (dd-mmm)
          date2 = 15-oct  # Enter sowing window END date (dd-mmm)
          must_sow = yes  # Must sow?
          raincrit = 30  # Amount of rainfall
          rainnumdays = 3  # Number of days of rainfall
          esw_amount = 200  # Enter minimum allowable available soil water (mm)
          # Sowing parameters
          crop = sorghum  # Enter name of crop to sow
          density = 7  # Enter sowing density (plants/m2)
          depth = 30  # Enter sowing depth (mm)
          cultivar = early  # Enter cultivar
          row_spacing = 750  # Enter row spacing (mm)
          skiprow = double
          ftn = 3  # Enter Fertile Tiller Number
          on start_of_day:
          script: same as in Solid.paddock.Manager folder.Sorghum Sowing with Tillers
          on init:
```
               nextcrop = 0
               fallowin = 0
```
          on end_of_day:
```
if (paddock_is_fallow() = 0) then
   outputfile do_output
endif
```
      outputfile -> /simulations/Solid/paddock/outputfile: filename=Double.out; title=Double
        variables -> /simulations/Solid/paddock/outputfile/Variables
  simulation Solid1
    metfile met: filename=%apsim%/Examples/MetFiles/Goond.met
    clock
      start_date = 01/06/1940  # Enter the start date of the simulation
      end_date = 31/07/1941  # Enter the end date of the simulation
    summaryfile
    area paddock
      Soil: same as Solid.paddock.Soil
      surfaceom SurfaceOrganicMatter
        PoolName = wheat  # Organic Matter pool name
        type = wheat  # Organic Matter type
        mass = 1000  # Initial surface residue (kg/ha)
        cnr = 80  # C:N ratio of initial residue
        standing_fraction = 0  # Fraction of residue standing
      fertiliser
      sorghum
      folder Manager folder
        manager Reset water, nitrogen, surfaceOM and phosphorus on sowing: same as Solid.paddock.Manager folder.Reset water, nitrogen, surfaceOM and phosphorus on sowing
        manager Sorghum Sowing with Tillers
          # Sowing criteria
          date1 = 15-oct  # Enter sowing window START date (dd-mmm)
          date2 = 15-oct  # Enter sowing window END date (dd-mmm)
          must_sow = yes  # Must sow?
          raincrit = 30  # Amount of rainfall
          rainnumdays = 3  # Number of days of rainfall
          esw_amount = 200  # Enter minimum allowable available soil water (mm)
          # Sowing parameters
          crop = sorghum  # Enter name of crop to sow
          density = 7  # Enter sowing density (plants/m2)
          depth = 30  # Enter sowing depth (mm)
          cultivar = early  # Enter cultivar
          row_spacing = 1500  # Enter row spacing (mm)
          skiprow = solid
          ftn = 3  # Enter Fertile Tiller Number
          on start_of_day:
          script: same as in Solid.paddock.Manager folder.Sorghum Sowing with Tillers
          on init:
```
               nextcrop = 0
               fallowin = 0
```
          on end_of_day:
```
if (paddock_is_fallow() = 0) then
   outputfile do_output
endif
```
        manager Harvesting rule
          # Harvesting criteria
          crop = sorghum  # Enter name of crop to harvest when ripe
          on end_of_day:
          script: same as in Solid.paddock.Manager folder.Harvesting rule
        manager Fertilise at sowing: same as Solid.paddock.Manager folder.Fertilise at sowing
      outputfile: filename=Solid1.out; title=Solid1
        variables
          variables: dd/mm/yyyy as Date, biomass, yield, esw, biomass_n
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