folder TillerTest: version=37; creator=Apsim 7.10-r0
  targets
  vars
  simulation Base
    clock
      start_date = 01/09/1960
      end_date = 30/06/2016
    summaryfile
    metfile met: filename=Biloela.met
    area paddock
      surfaceom Surface Organic Matter
        PoolName = wheat  # Organic Matter pool name
        type = wheat  # Organic Matter type
        mass = 1000  # Initial surface residue (kg/ha)
        cnr = 80  # C:N ratio of initial residue
        standing_fraction = 0  # Fraction of residue standing
      fertiliser
      folder Manager folder
        manager Reset on sowing
          # When should a reset be done
          modulename = Sorghum  # The module the event is to come from
          eventname = sowing  # On which event should a reset be done
          # Reset details
          soilmodule = Soil  # Name of your soil module
          surfaceommodule = Surface Organic Matter  # Name of your surface organic matter module
          pmodule = Phosphorus  # Name of your phosphorus module
          resetWater = yes  # Reset soil water?
          resetNitrogen = yes  # Reset soil nitrogen?
          resetSurfaceOM = yes  # Reset surface organic matter?
          resetP = no  # Reset phosphorus?
          on [modulename].[eventname]:
```
            resetWater = '[resetWater]'
            resetNitrogen  = '[resetNitrogen]'
            resetSurfaceOM = '[resetSurfaceOM]'
            resetP = '[resetP]'
            if (resetWater = 'yes') then
                '[soilmodule] Water' reset
            endif
            if (resetNitrogen = 'yes') then
                '[soilmodule] Nitrogen' reset
            endif
            if (resetSurfaceOM = 'yes') then
                '[surfaceommodule]' reset
            endif
            if (resetP = 'yes') then
                '[pmodule]' reset
            endif
            if (resetWater = 'yes' or resetNitrogen = 'yes' or resetSurfaceOM = 'yes' or resetP = 'yes') then
               act_mods reseting
            endif
```
        manager Sow on a fixed date
          # Sowing criteria
          date = 15-sep  # Enter sowing date (dd-mmm)
          # Sowing parameters
          crop = Sorghum  # Enter name of crop to sow
          density = 4  # Enter sowing density (plants/m2)
          depth = 30  # Enter sowing depth (mm)
          cultivar = LowTillering  # Enter cultivar
          class = plant  # Enter crop growth class
          row_spacing = 1000  # Enter row spacing (mm)
          skiprow = solid
          on start_of_day:
```
if (today = date('[date]') then
[crop] sow plants =[density], sowing_depth = [depth], cultivar = [cultivar], row_spacing = [row_spacing], crop_class = [class], skip = [skiprow]
endif
```
        manager Fertilise at sowing
          # When should fertiliser be applied
          modulename = Sorghum  # On which module should the event come from
          eventname = sowing  # On which event should fertiliser be applied
          # Fertiliser application details
          fertmodule = fertiliser  # Module used to apply the fertiliser
          fert_amount_sow = 240  # Amount of starter fertiliser at sowing (kg/ha)
          fert_type_sow = NO3_N  # Sowing fertiliser type
          on [modulename].[eventname]:
```
[fertmodule] apply amount = [fert_amount_sow] (kg/ha), depth = 50 (mm), type = [fert_type_sow]
fert_amount_sow=[fert_amount_sow]
```
        manager Harvesting rule
          # Harvesting criteria
          crop = Sorghum  # Enter name of crop to harvest when ripe
          on end_of_day:
```
if [crop].StageName = 'harvest_ripe' or [crop].plant_status = 'dead' then
[crop]  harvest
[crop]  end_crop
endif
```
      Soil: SoilType=LawesBlackVertosol; LocalName=Gatton RS; Site=Gatton RS; NearestTown=Unknown; Region=Gatton; NaturalVegetation=Unknown; Latitude=0; Longitude=0; YearOfSampling=0
        Water
          Thickness  BD    AirDry  LL15  DUL   SAT
          150        1.32  0.1     0.26  0.41  0.46
          150        1.3   0.15    0.26  0.43  0.48
          300        1.23  0.25    0.26  0.46  0.51
          300        1.27  0.26    0.26  0.44  0.49
          300        1.37  0.25    0.25  0.4   0.45
          300        1.35  0.28    0.28  0.41  0.46
          300        1.35  0.31    0.31  0.38  0.43
          SoilCrop Sorghum: LL=[0.26, 0.26, 0.26, 0.26, 0.25, 0.28, 0.31]; KL=[0.08, 0.08, 0.08, 0.08, 0.06, 0.04, 0.02]; XF=[1, 1, 1, 1, 1, 1, 1]
        SoilWater: SummerCona=3.5; SummerU=6; SummerDate=1-Nov; WinterCona=3.5; WinterU=6; WinterDate=1-Apr; DiffusConst=88; DiffusSlope=35.4; Salb=0.13; CN2Bare=91; CNRed=20; CNCov=0.8; Thickness=[150, 150, 300, 300, 300, 300, 300]; SWCON=[0.5, 0.5, 0.5, 0.5, 0.5, 0.5, 0.5]
        SoilOrganicMatter: RootCN=30; RootWt=1500; SoilCN=12.5; EnrACoeff=7.4; EnrBCoeff=0.2; OCUnits=Total
          Thickness  OC    FBiom  FInert
          150        1.3   0.03   0.31
          150        0.65  0.01   0.38
          300        0.32  0      0.47
          300        0.11  0      0.7
          300        0.11  0      0.9
          300        0.11  0      0.95
          300        0.11  0      0.95
        Analysis: Thickness=[150, 150, 300, 300, 300, 300, 300]; PH=[8.2, 8.7, 8.9, 8.1, 8, 8, 8]; PHUnits=Water; BoronUnits=HotWater
        Sample Initial Soil: NO3Units=kgha; NH4Units=ppm; SWUnits=Volumetric; OCUnits=Total; PHUnits=Water
          Thickness  NO3    NH4  SW
          150        13.86  1    0.41
          150        9.75   0.5  0.43
          300        14.76  0.3  0.46
          300        7.62   0.2  0.44
          300        6.165  0.2  0.4
          300        4.05   0.2  0.41
          300        2.025  0.2  0.38
      outputfile: filename=Base.out; title=Base
        variables
          variable:
            Season
            Yield
            calculatedTillers as PotentialTillers
            tillersAdded
            tillers as FTN
            TillerNo as ROTtillers
        events Reporting Frequency: event=harvesting
      manager Calcs
        on sowing:
```
if (day > 180) then
   season = year
else
   season = year - 1
endif
```
      Sorghum
        sorghumConstants standard
          crop_type = sorghum
          default_crop_class = plant
          stage_names = sowing germination emergence end_of_juvenile floral_initiation flag_leaf flowering start_grain_fill end_grain_fill maturity harvest_ripe end_crop
          stage_code = 1   2   3    4      5     6     7    8    9    10   11   12
          pesw_germ = 0.0  # plant extractable soil water in seedling layer inadequate for germination (mm/mm)
          shoot_lag = 15.0  # time lag before linear coleoptile growth starts (deg days)
          shoot_rate = 0.6  # growing deg day increase with depth for coleoptile (deg day/mm depth)
          twilight = -2.2  # Twilight is defined as the interval between sunrise or sunset and the time when the true
          x_temp = 11 30  42  # cardinal temps.
          y_tt = 0  19   0  # diff
          x_temp_fm = 5.7 23.5
          y_tt_fm = 0   17.8
          leaf_no_at_emerg = 1.0  # (expanded) leaf number at emergence ()
          leaf_no_seed = 4.0  # number of leaf primordia present in seed
          leaf_no_min = 10.0  # minimum leaf number
          leaf_no_max = 40.0  # maximum leaf number
          leaf_init_rate = 21.6  # degree days to initiate each leaf primordium until floral init (deg day)
          leaf_app_rate1 = 41.0  # Growing deg day required to develop the most leaf ligules. (deg day).
          leaf_app_rate2 = 20.0  # Growing deg day required to develop last leaf ligules. (deg day).
          leaf_no_rate_change = 3.5  # Leaf no below flag above which leaf appearance rate changes from rate1 to rate2.
          leaf_app_rate = 41.0  # last leaf ligules. (deg day).
          rue = 1.25  # g bio/MJ Radn radiation use efficiency
          row_spacing_default = 750  # Default rowing spacing used to calculate k
          x_row_spacing = 0.20   0.50   1.00  # Row spacing
          y_extinct_coef = 0.70   0.40   0.40  # extinction coefficient for green leaf
          x_ave_temp = 8 20 35 50  # mean daily temperature
          y_stress_photo = 0  1  1  0  # multiplier on RUE
          dm_leaf_init = 0.1  # leaf weight at emergence (g/plant)
          dm_root_init = 0.1  # root weight at emergence (g/plant)
          dm_stem_init = 0.1  # stem weight at emergence (g/plant)
          stem_trans_frac = 0.20  # fraction of stem used in translocation to grain
          leaf_trans_frac = 0.15  # fraction of leaf used in translocation to grain
          retransRate = 0.15
          ratio_root_shoot = 0   0   1    1     0.33  0.33  0.087  0    0     0    0    0
          partition_rate_leaf = 0.006  # coefficient of sigmoidal function between leaf partition fraction and internode no**2 (0-1)
          frac_stem2flower = 0.30  # fraction of dm allocated to stem that goes to developing head
          grn_water_cont = 0.130  # water content of grain g/g
          GrainTempWindow = -150 50
          GrainTempOrdinals = 36 40
          leaf_no_correction = 1.52  # corrects for other growing leaves
          x_lai = 0.1    4
          y_lai_sla_max = 50000 25000  # maximum specific leaf area for delta LAI
          lai_sla_min = 8000  8000  # minimum specific leaf area for delta LAI
          sla_max = 45000
          sla_min = 8000  # minimum specific leaf area for new leaf area
          initial_tpla = 200.0  # initial total plant leaf area
          tiller_coef = 0.66  # exponent for determining leaf area on each additional tiller
          tpla_inflection_ratio = 0.66  # inflection coefficient of TPLA curve
          height_max = 3500.0  # maximum canopy height
          height_stem_slope = 250.0  # rate of height growth (mm/g/stem)
          root_depth_rate = 0 27.0  27.0  27.0 27.0  27.0   27.0   0      0       0    0    0  # mm/day.
          x_sw_ratio = 0   0.25  # water availability for effects on root depth growth
          y_sw_fac_root = 0   1  # stress factor for root depth growth, This may be probably the same for all crops
          initial_root_depth = 50  # initial depth of roots (mm)
          specific_root_length = 100000
          x_plant_rld = 0.0  0.1  # root branching
          y_rel_root_rate = 1.0  1.0
          transp_eff_cf = 0.009
          svp_fract = 0.75  # (0-1)
          x_sw_demand_ratio = 0.1 1.1  # water availability This is the original value
          y_swdef_leaf = 0   1  # stress indices
          x_sw_avail_ratio = 0 0.2 1.0  # water availability Needs to be severe to worry phenology
          y_swdef_pheno = 0 1.0 1.0  # stress indices
          no3_diffn_const = 2.0
          maxUptakeRate = 0.029
          initialRootNConc = 0.020
          targetRootNConc = 0.002
          initialLeafSLN = 1.5
          targetLeafSLN = 1.5
          newLeafSLN = 1.0
          leafDilnNSlope = 0.0043
          leafDilnNInt = -0.0017
          initialStemNConc = 0.01
          x_stem_n = 3         5       7         10
          targetStemNConc = 0.055   0.016   0.01      0.005
          structStemNConc = 0.012  0.012   0.005   0.0015
          stemDilnNSlope = 0.0062
          stemDilnNInt = -0.001
          initialRachisNConc = 0.000
          targetRachisNConc = 0.01
          structRachisNConc = 0.003
          rachisDilnNSlope = 0.0062
          rachisDilnNInt = -0.001
          grainFillRate = 0.001
          targetGrainNConc = 0.0175
          grainFillIntercept = 0.0000319
          grainFillSlope = 0.4026
          nUptakeCease = 570
          nSupplyFrac = 5
          dm_root_sen_frac = 0.002  # fraction of root dry matter senesced each day
          lai_sen_light = 4.0  # induced senescence occurs (m^2/m^2)
          sen_light_slope = 0.008  # sensitivity of leaf area senescence to shading
          x_temp_senescence = 0.0 6.0  # minimum temperature for frost senescence table (oC)
          y_senescence_fac = 1   0  # daily fraction of leaf area senesced due to frost (0-1)
          sen_rate_water = 0.05  # slope in linear eqn relating soil water stress during photosynthesis to leaf senesence rate
          dead_detach_frac = 0 0 0 0 0  # fraction detached from each part of a dead plant per day.
          dm_leaf_detach_frac = 0
          sen_light_time_const = 10.0  # delay factor for light senescence
          sen_radn_crit = 2  # radiation level for onset of light senescence
          frost_kill = 1.0  # temperature threshold for leaf death
          sen_water_time_const = 10.0  # delay factor for water senescence
          sen_threshold = 0.25  # supply:demand ratio for onset of water senescence
          spla_slope = 81.5  # regression slope for calculating inflection point for leaf senescence
          tt_emerg_limit = 150.0  # maximum degree days allowed for emergence to take place
          days_germ_limit = 40.0  # maximum days allowed after sowing for germination to take place (days)
          swdf_photo_limit = 99.0  # critical cumulative photosynthesis water stress, above which the crop partly fails (unitless)
          swdf_photo_rate = 0.0  # rate of plant reduction with photosynthesis water stress
          swdf_pheno_limit = 99.0  # critical cumulative phenology water stress, above which the crop fails (unitless)
          x_weighted_temp = 55.0  60.0
          y_plant_death = 0.0   1.0
          stress_determinants = leaf stem grain
          yield_parts = grain
          retrans_parts = leaf stem  flower
          pfact_photo_slope = 2.5
          pfact_expansion_slope = 2.5
          pfact_pheno_slope = 100
          pfact_grain_slope = 20
          p_uptake_factor = 1.5  # factor to calc total P uptake from demand for today's growth
          x_p_stage_code = 3       4      5      6      7      8      10
          y_p_conc_max_leaf = 0.0059  0.0054 0.0040 0.0029 0.0026 0.0025 0.0022
          y_p_conc_min_leaf = 0.003   0.003  0.0029 0.0011 0.0011 0.0008 0.0006
          y_p_conc_sen_leaf = 0.0005  0.0005 0.0005 0.0005 0.0005 0.0005 0.0005
          y_p_conc_max_stem = 0.0057  0.0038 0.0037 0.0018 0.0016 0.0013 0.0013
          y_p_conc_min_stem = 0.003   0.003  0.002  0.0006 0.0006 0.0002 0.0002
          y_p_conc_sen_stem = 0.0002  0.0002 0.0002 0.0002 0.0002 0.0002 0.0002
          y_p_conc_max_root = 0.0010  0.0010 0.0010 0.0010 0.0010 0.0010 0.0010  # assume P conc in roots non-varying
          y_p_conc_min_root = 0.0010  0.0010 0.0010 0.0010 0.0010 0.0010 0.0010
          y_p_conc_sen_root = 0.0010  0.0010 0.0010 0.0010 0.0010 0.0010 0.0010
          y_p_conc_max_flower = 0.0057  0.0038 0.0037 0.0018 0.0016 0.0013 0.0013  # assumed same as stem
          y_p_conc_min_flower = 0.003   0.003  0.002  0.0006 0.0006 0.0002 0.0002
          y_p_conc_sen_flower = 0.0002  0.0002 0.0002 0.0002 0.0002 0.0002 0.0002
          y_p_conc_max_grain = 0.001   0.001  0.001  0.001  0.052  0.0044  0.0034
          y_p_conc_min_grain = 0.001   0.001  0.001  0.001  0.001  0.0015  0.0015  # based on Kenya maize data
          y_p_conc_sen_grain = 0.001   0.001  0.001  0.001  0.001  0.0015  0.0015
          y_p_conc_max_energy = 0.001   0.001  0.001  0.001  0.001  0.001  0.001
          y_p_conc_min_energy = 0.001   0.001  0.001  0.001  0.001  0.001  0.001
          y_p_conc_sen_energy = 0.001   0.001  0.001  0.001  0.001  0.001  0.001
          p_conc_init_leaf = 0.0059
          p_conc_init_stem = 0.0057
          p_conc_init_root = 0.010
          p_conc_init_flower = 0.0057
          p_conc_init_grain = 0.0052
          p_conc_init_energy = 0.0
          ll_ub = 1000.0  # upper limit of lower limit
          kl_ub = 1.0  # upper limit of water uptake factor
          minsw = 0.00001  # lowest acceptable value for ll
          latitude_ub = 90  # latitude upper limit
          latitude_lb = -90  # latitude lower limit
          maxt_ub = 55  # max. temperature upper limit
          maxt_lb = 0  # max. temperature lower limit
          mint_ub = 40  # min. temperature upper limit
          mint_lb = -10  # min. temperature lower limit
          radn_ub = 50  # radiation upper limit
          radn_lb = 1  # radiation lower limit
          dlayer_ub = 1000  # layer depth upper limit
          dlayer_lb = 0  # layer depth lower limit
          dul_dep_ub = 1000  # drained upper limit upper limit
          dul_dep_lb = 0  # drained upper limit lower limit
          sw_dep_ub = 1000  # soil water upper limit
          sw_dep_lb = 0  # soil water lower limit
          sw_ub = 1.0  # soil water upper limit
          sw_lb = 0.0  # soil water upper limit
          no3_ub = 10000  # soil nitrate upper limit
          no3_lb = 0  # soil nitrate lower limit
          no3_min_ub = 10000  # min. soil nitrate upper limit
          no3_min_lb = 0  # min. soil nitrate lower limit
          nh4_ub = 10000  # soil nitrate upper limit
          nh4_lb = 0  # soil nitrate lower limit
          nh4_min_ub = 10000  # min. soil nitrate upper limit
          nh4_min_lb = 0  # min. soil nitrate lower limit
          head_grain_no_max_ub = 45000.0  # upper limit !NOT USED
          grain_gth_rate_ub = 20.0  # upper limit !NOT USED
          tt_emerg_to_endjuv_ub = 500.0  # upper limit
          pp_endjuv_to_init_ub = 200.0  # upper limit oC h-1
          tt_flower_to_maturity_ub = 1000.0  # upper limit
          tt_maturity_to_ripe_ub = 1000.0  # upper limit
          tt_flower_to_start_grain_ub = 1000.0  # upper limit
          tt_flag_to_flower_ub = 1000.0  # upper limit
          senescedLeafSLN = 0.3
          leaf_area_calc_type = bellcurve  # Canopy calculation
          tillerSlaBound = 30  # SLA Range (%)
        sorghumGenotype Buster
          tt_emerg_to_endjuv = 100
          photoperiod_crit1 = 11.5
          photoperiod_crit2 = 13.5
          photoperiod_slope = 11.5
          tt_endjuv_to_init = 160
          tt_flag_to_flower = 170
          tt_flower_to_start_grain = 80
          tt_flower_to_maturity = 761
          tt_maturity_to_ripe = 1
          main_stem_coef = 2.9
          tpla_prod_coef = 0.018
          dm_per_seed = 0.00083
          x_stem_wt = 0    80
          y_height = 0  2000
          maxGFRate = 0.09
          x_stem_wt = 0    80  # look up table for canopy height
          y_height = 0  2000  # plant canopy height
          aX0 = 0.687  # Largest leaf multiplier
          aMaxS = 22.25  # Largest Leaf Area Slope
          aMaxI = 92.45  # Intercept for Largest leaf calculation
          aMaxVert = 0.3  # Vertical Offset for Largest Leaf Calc
          tilleringPropensity = -0.82  # Propensity to Tiller
          tillerSdSlope = 0.2065  # Tiller Supply/demand slope
          aTillerVert = 0.05  # Additional Vertical Offset for each additional Tiller
        sorghumGenotype LowTillering
          tt_emerg_to_endjuv = 100
          photoperiod_crit1 = 11.5
          photoperiod_crit2 = 13.5
          photoperiod_slope = 11.5
          tt_endjuv_to_init = 160
          tt_flag_to_flower = 170
          tt_flower_to_start_grain = 80
          tt_flower_to_maturity = 761
          tt_maturity_to_ripe = 1
          main_stem_coef = 2.9
          tpla_prod_coef = 0.018
          dm_per_seed = 0.00083
          x_stem_wt = 0    80
          y_height = 0  2000
          maxGFRate = 0.09
          x_stem_wt = 0    80  # look up table for canopy height
          y_height = 0  2000  # plant canopy height
          aX0 = 0.687  # Largest leaf multiplier
          aMaxS = 22.25  # Largest Leaf Area Slope
          aMaxI = 92.45  # Intercept for Largest leaf calculation
          aMaxVert = 0.3  # Vertical Offset for Largest Leaf Calc
          tilleringPropensity = -4.5  # Propensity to Tiller
          tillerSdSlope = 0.2065  # Tiller Supply/demand slope
          aTillerVert = 0.05  # Additional Vertical Offset for each additional Tiller
        sorghumGenotype MediumTillering
          tt_emerg_to_endjuv = 100
          photoperiod_crit1 = 11.5
          photoperiod_crit2 = 13.5
          photoperiod_slope = 11.5
          tt_endjuv_to_init = 160
          tt_flag_to_flower = 170
          tt_flower_to_start_grain = 80
          tt_flower_to_maturity = 761
          tt_maturity_to_ripe = 1
          main_stem_coef = 2.9
          tpla_prod_coef = 0.018
          dm_per_seed = 0.00083
          x_stem_wt = 0    80
          y_height = 0  2000
          maxGFRate = 0.09
          x_stem_wt = 0    80  # look up table for canopy height
          y_height = 0  2000  # plant canopy height
          aX0 = 0.687  # Largest leaf multiplier
          aMaxS = 22.25  # Largest Leaf Area Slope
          aMaxI = 92.45  # Intercept for Largest leaf calculation
          aMaxVert = 0.3  # Vertical Offset for Largest Leaf Calc
          tilleringPropensity = -1.75  # Propensity to Tiller
          tillerSdSlope = 0.2065  # Tiller Supply/demand slope
          aTillerVert = 0.05  # Additional Vertical Offset for each additional Tiller
        sorghumGenotype HighTillering
          tt_emerg_to_endjuv = 100
          photoperiod_crit1 = 11.5
          photoperiod_crit2 = 13.5
          photoperiod_slope = 11.5
          tt_endjuv_to_init = 160
          tt_flag_to_flower = 170
          tt_flower_to_start_grain = 80
          tt_flower_to_maturity = 761
          tt_maturity_to_ripe = 1
          main_stem_coef = 2.9
          tpla_prod_coef = 0.018
          dm_per_seed = 0.00083
          x_stem_wt = 0    80
          y_height = 0  2000
          maxGFRate = 0.09
          x_stem_wt = 0    80  # look up table for canopy height
          y_height = 0  2000  # plant canopy height
          aX0 = 0.687  # Largest leaf multiplier
          aMaxS = 22.25  # Largest Leaf Area Slope
          aMaxI = 92.45  # Intercept for Largest leaf calculation
          aMaxVert = 0.3  # Vertical Offset for Largest Leaf Calc
          tilleringPropensity = 1  # Propensity to Tiller
          tillerSdSlope = 0.2065  # Tiller Supply/demand slope
          aTillerVert = 0.05  # Additional Vertical Offset for each additional Tiller
  factorial Factorials: active=0
    settings
    folder Region
      folder NNSW
        folder Tamworth
          factor Met
            targets: Target=/TillerTest/Base/met
            vars: filename=Tamworth.met
            metfile met: filename=Biloela.met
          factor Soil
            targets: Target=/TillerTest/Base/paddock/Soil
            vars
            Soil TamworthSoil: ASCOrder=Vertosol; ASCSubOrder=Black; SoilType=Clay; Site=Breeza; NearestTown=Breeza, NSW 2381; Region=North West Slopes and Plains; State=New South Wales; Country=Australia; NaturalVegetation=Grasslands; ApsoilNumber=119; Latitude=-31.168; Longitude=150.424; LocationAccuracy=+/- 20m; YearOfSampling=0; DataSource=CSIRO Plant Industry, Myall Vale (D Richards)
              Water
                Thickness  BD    AirDry  LL15  DUL   SAT
                150        1.12  0.14    0.28  0.5   0.55
                150        1.18  0.224   0.28  0.48  0.53
                300        1.19  0.27    0.27  0.47  0.52
                300        1.21  0.26    0.26  0.46  0.51
                300        1.26  0.26    0.26  0.45  0.5
                300        1.38  0.26    0.26  0.4   0.45
                300        1.4   0.26    0.26  0.39  0.44
                BD, DUL source: Field measured and checked for sensibility
                AirDry, LL15 source: Estimated based on local knowledge
                SAT source: Calculated from measured, estimated or calculated BD
                SoilCrop wheat: LL=[0.28, 0.28, 0.27, 0.26, 0.3, 0.28, 0.33]; KL=[0.06, 0.06, 0.06, 0.04, 0.04, 0.02, 0.01]; XF=[1, 1, 1, 1, 1, 1, 1]
                  LL source: Field measured and checked for sensibility
                SoilCrop barley: LL=[0.28, 0.28, 0.27, 0.26, 0.3, 0.28, 0.33]; KL=[0.07, 0.07, 0.07, 0.05, 0.05, 0.03, 0.02]; XF=[1, 1, 1, 1, 1, 1, 1]
                  LL source: Estimated based on local knowledge
                SoilCrop cotton: LL=[0.28, 0.28, 0.3, 0.31, 0.34, 0.36, 0.38]; KL=[0.1, 0.1, 0.1, 0.1, 0.09, 0.07, 0.05]; XF=[1, 1, 1, 1, 1, 1, 1]
                  LL source: Field measured and checked for sensibility
                SoilCrop sorghum: LL=[0.28, 0.28, 0.32, 0.34, 0.35, 0.34, 0.35]; KL=[0.07, 0.07, 0.07, 0.05, 0.05, 0.04, 0.03]; XF=[1, 1, 1, 1, 1, 1, 1]
                  LL source: Field measured and checked for sensibility
              SoilWater: SummerCona=3.5; SummerU=6; SummerDate=1-Nov; WinterCona=2.5; WinterU=4; WinterDate=1-Apr; DiffusConst=40; DiffusSlope=16; Salb=0.12; CN2Bare=73; CNRed=20; CNCov=0.8; Thickness=[150, 150, 300, 300, 300, 300, 300]; SWCON=[0.3, 0.3, 0.3, 0.3, 0.3, 0.3, 0.3]
              SoilOrganicMatter: RootCN=40; RootWt=1000; SoilCN=12; EnrACoeff=7.4; EnrBCoeff=0.2; OCUnits=WalkleyBlack
                Thickness  OC        FBiom  FInert
                150        0.915385  0.04   0.4
                150        0.776923  0.02   0.6
                300        0.346154  0.02   0.8
                300        0.230769  0.02   1
                300        0.153846  0.01   1
                300        0.123077  0.01   1
                300        0.130769  0.01   1
                OC source: Estimated based on local knowledge
              Analysis: Thickness=[150, 150, 300, 300, 300, 300, 300]; PH=[8.2, 8.5, 8.6, 8.6, 7.4, 5.3, 5.3]; PHUnits=Water; BoronUnits=HotWater
                PH source: Estimated based on local knowledge
              InitialWater: FractionFull=0.75; PercentMethod=FilledFromTop; RelativeTo=ll15
              Sample InitialNitrogen: NO3Units=kgha; NH4Units=kgha; SWUnits=Volumetric; OCUnits=Total; PHUnits=Water
                Thickness  NO3  NH4
                150        30   1
                150        20   1
                300        20   1
                300        20   1
                300        20   1
                300        22   2
                300        22   2
        folder Moree
          factor Met
            targets: Target=/TillerTest/Base/met
            vars: filename=Moree.met
            metfile met: filename=Biloela.met
          factor Soil
            targets: Target=/TillerTest/Base/paddock/Soil
            vars
            Soil MoreeSoil: ASCOrder=Vertosol; ASCSubOrder=Grey; SoilType=Clay; Site=Moree; NearestTown=Moree, NSW 2400; Region=North West Slopes and Plains; State=New South Wales; Country=Australia; NaturalVegetation=Poplar Box; ApsoilNumber=59; Latitude=-29.038; Longitude=149.94; LocationAccuracy=+/- 20m; YearOfSampling=0; DataSource=CSIRO Sustainable Ecosystems, Toowoomba
              Comments=Chickpea is only measured LL and KL,XF. All other crops copy chickpeas LL and use their default KL and XF.
              Water
                Thickness  BD    AirDry  LL15  DUL   SAT
                150        1.32  0.125   0.25  0.42  0.47
                150        1.33  0.216   0.27  0.42  0.47
                300        1.31  0.28    0.28  0.42  0.47
                300        1.34  0.28    0.28  0.41  0.46
                300        1.36  0.28    0.28  0.41  0.46
                300        1.36  0.28    0.28  0.41  0.46
                300        1.36  0.28    0.28  0.41  0.46
                BD, DUL source: Field measured and checked for sensibility
                AirDry, LL15 source: Estimated based on local knowledge
                SAT source: Calculated from measured, estimated or calculated BD
                SoilCrop wheat: LL=[0.25, 0.27, 0.28, 0.3, 0.38, 0.41, 0.41]; KL=[0.06, 0.06, 0.06, 0.04, 0.04, 0.02, 0.01]; XF=[1, 1, 1, 1, 1, 1, 1]
                  LL source: Estimated based on local knowledge
                SoilCrop barley: LL=[0.25, 0.27, 0.28, 0.3, 0.38, 0.41, 0.41]; KL=[0.07, 0.07, 0.07, 0.05, 0.05, 0.03, 0.02]; XF=[1, 1, 1, 1, 1, 1, 1]
                  LL source: Estimated based on local knowledge
                SoilCrop oats: same as Factorials.Region.NNSW.Moree.Soil.MoreeSoil.Water.wheat
                SoilCrop chickpea: LL=[0.25, 0.27, 0.28, 0.3, 0.38, 0.41, 0.41]; KL=[0.06, 0.06, 0.06, 0.06, 0.06, 0.06, 0.06]; XF=[1, 1, 1, 1, 1, 1, 1]
                  LL source: Field measured and checked for sensibility
                SoilCrop sorghum: LL=[0.25, 0.27, 0.28, 0.3, 0.38, 0.41, 0.41]; KL=[0.07, 0.07, 0.07, 0.05, 0.05, 0.04, 0.03]; XF=[1, 1, 1, 1, 1, 1, 1]
                  LL source: Estimated based on local knowledge
                SoilCrop fababean: LL=[0.25, 0.27, 0.28, 0.32, 0.38, 0.4, 0.41]; KL=[0.08, 0.08, 0.08, 0.08, 0.06, 0.04, 0.03]; XF=[1, 1, 1, 1, 1, 1, 1]
                  LL source: Field measured and checked for sensibility
              SoilWater: same as Factorials.Region.NNSW.Tamworth.Soil.TamworthSoil.SoilWater
              SoilOrganicMatter: same as Factorials.Region.NNSW.Tamworth.Soil.TamworthSoil.SoilOrganicMatter
              Analysis: same as Factorials.Region.NNSW.Tamworth.Soil.TamworthSoil.Analysis
              InitialWater: FractionFull=0.75; PercentMethod=FilledFromTop; RelativeTo=ll15
              Sample InitialNitrogen: NO3Units=kgha; NH4Units=kgha; SWUnits=Volumetric; OCUnits=Total; PHUnits=Water
                Thickness  NO3  NH4
                150        30   1
                150        20   1
                300        20   1
                300        20   1
                300        20   1
                300        22   2
                300        22   2
        factor Sowing
          targets: Target=/TillerTest/Base/paddock/Manager folder/Sow on a fixed date
          vars: date=15-oct, 15-nov, 15-dec, 15-jan; density=4, 6, 8, 12; cultivar=LowTillering, MediumTillering, HighTillering; skiprow=solid, single, double
          manager Sow on a fixed date: same as Base.paddock.Manager folder.Sow on a fixed date
        folder Walgett
          factor Met
            targets: Target=/TillerTest/Base/met
            vars: filename=Walgett.met
            metfile met: filename=Biloela.met
          factor Soil
            targets: Target=/TillerTest/Base/paddock/Soil
            vars
            Soil WalgettSoil: ASCOrder=Vertosol; ASCSubOrder=Grey; SoilType=Clay; Site=45km NW Walgett; NearestTown=Walgett, NSW 2400; Region=North West Slopes and Plains; State=New South Wales; Country=Australia; NaturalVegetation=Open grassland; ApsoilNumber=1016; Latitude=-29.6678; Longitude=147.999; LocationAccuracy=+/-1000m; YearOfSampling=2003
              DataSource=Collected by Northern Grower Alliance in conjunction with CSIRO
              Water
                Thickness  BD    AirDry  LL15  DUL    SAT
                150        1.35  0.145   0.29  0.412  0.462
                150        1.4   0.232   0.29  0.392  0.443
                300        1.35  0.29    0.29  0.438  0.488
                300        1.35  0.29    0.29  0.412  0.462
                300        1.38  0.29    0.29  0.399  0.449
                300        1.41  0.29    0.29  0.387  0.437
                300        1.41  0.29    0.29  0.388  0.438
                BD source: Calculated from gravimetric moisture when profile wet but drained
                AirDry, LL15 source: Estimated based on local knowledge
                DUL source: Field measured and checked for sensibility
                SAT source: Calculated from measured, estimated or calculated BD
                SoilCrop wheat: LL=[0.29, 0.29, 0.29, 0.3, 0.34, 0.383, 0.385]; KL=[0.06, 0.06, 0.06, 0.04, 0.04, 0.02, 0.02]; XF=[1, 1, 1, 1, 1, 1, 1]
                  LL source: Measured
                SoilCrop sorghum: LL=[0.29, 0.29, 0.29, 0.29, 0.29, 0.29, 0.29]; KL=[0.07, 0.07, 0.07, 0.05, 0.05, 0.05, 0.05]; XF=[1, 1, 1, 1, 1, 1, 1]
              SoilWater: SummerCona=3.5; SummerU=6; SummerDate=1-Nov; WinterCona=2.5; WinterU=4; WinterDate=1-apr; DiffusConst=40; DiffusSlope=16; Salb=0.12; CN2Bare=73; CNRed=20; CNCov=0.8; Thickness=[150, 150, 300, 300, 300, 300, 300]; SWCON=[0.3, 0.3, 0.3, 0.3, 0.3, 0.3, 0.3]
              SoilOrganicMatter: RootCN=40; RootWt=1000; SoilCN=12; EnrACoeff=7.4; EnrBCoeff=0.2; OCUnits=Total
                Thickness  OC    FBiom  FInert
                150        0.88  0.04   0.4
                150        0.76  0.02   0.6
                300        0.62  0.02   0.8
                300        0.32  0.02   1
                300        0.12  0.01   1
                300        0.1   0.01   1
                300        0.05  0.01   1
                OC source: Estimated based on local knowledge
              Analysis: PHUnits=Water; BoronUnits=HotWater
                Thickness  Texture  PH
                150        Clay     8.9
                150        Clay     9.2
                300        Clay     9.3
                300        Clay     9
                300        Clay     8.8
                300        Clay     7.5
                300        Clay     8.4
                Texture, PH source: Estimated based on local knowledge
              InitialWater: FractionFull=0.75; PercentMethod=FilledFromTop; RelativeTo=ll15
              Sample InitialNitrogen: NO3Units=kgha; NH4Units=kgha; SWUnits=Volumetric; OCUnits=Total; PHUnits=Water
                Thickness  NO3  NH4
                150        30   1
                150        20   1
                300        20   1
                300        20   1
                300        20   1
                300        22   2
                300        22   2
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